# Phase 1: Single-Crystal FCC Aluminum Benchmark Test
# Potential: EAM potential for Al (Al_zhou.eam.alloy)
# Goal: Minimize, equilibrate at 300 K, measure energy/pressure/temperature and timesteps/sec benchmark.

units           metal
dimension       3
boundary        p p p
atom_style      atomic

# Create 14x14x14 FCC unit cells (10,976 atoms)
lattice         fcc 4.05
region          box block 0 14 0 14 0 14
create_box      1 box
create_atoms    1 box

mass            1 26.981539

# Pair potential
pair_style      eam/alloy
pair_coeff      * * ../data/Al_zhou.eam.alloy Al

# Neighbor list settings
neighbor        2.0 bin
neigh_modify    every 1 delay 5 check yes

# Initial velocities & Thermo formatting
velocity        all create 300.0 12345 mom yes rot yes dist gaussian
thermo          100
thermo_style    custom step temp pe ke etotal press vol lx ly lz

# Step 1: Energy Minimization
echo            both
print           "=== STAGE 1: Energy Minimization ==="
minimize        1.0e-15 1.0e-15 1000 10000

# Step 2: NPT Equilibration (300 K, 0 bar)
reset_timestep  0
timestep        0.001  # 1 fs

fix             1 all npt temp 300.0 300.0 0.1 iso 0.0 0.0 1.0

print           "=== STAGE 2: NPT Thermal Equilibration (300 K) ==="
run             1000

print           "=== Phase 1 Benchmark Complete ==="
